# transport, freight, lorry 16-32 metric ton, EURO5

Dataset: EcoSpold 2, unit process
Geography: RER
Time period: 2009-01-01 to 2013-12-31
Technology level: modern
Classification: ISIC rev.4 ecoinvent: 4923:Freight transport by road
Classification: EcoSpold01Categories: transport systems/road
Scenario: Business-as-Usual
Share of production covered: 100 %
Generated by: Andrew Simons
Published in: Keller, M. 2010
Database: ecoinvent
isCopyrightProtected: true
accessRestrictedTo: 1

## General comment
This dataset represents the service of 1tkm freight transport in a lorry of the size class 16-32 metric tons gross vehicle weight (GVW) and Euro V emissions class. The transport datasets refer to the entire transport life cycle i.e. to the construction, operation, maintenance and end of life of vehicle and road infrastructures. Fuel consumption and emissions are for average European journeys and load factors and not representative of a specific transport scenario. The average load factors are taken from the Tremove model v2.7b (2009) and EcoTransIT (2011) report. These are as follows:

Lorry size class Average load factor GVW

3.5-7.5t 0.98t 4.98t
7.5-16t 3.29t 9.29t
16-32t 5.79t 15.79t
>32t 15.96t 29.96t

The lorry size and load factor determines the GVW and therefore also the fuel consumption and amount of both exhaust and non-exhaust emissions. Non-exhaust emissions are those resulting from tyre, brake and road wear.

Fuel consumption and exhaust emissions are taken from v3.1 of the HBEFA model, using the data for Germany and without applying model weighting. There are a higher number of size categories used in HBEFA than in ecoinvent and so the data are grouped in order to fit the lorry size classes used in ecoinvent. The selective catalytic reduction (SCR) technology is around 3 times more common than that of exhaust gas recovery (EGR) as an emissions reduction measure and so the emission factors given in the dataset are weighted to reflect this. The data for the HBEFA categories SCR* and VI* were disregarded. The exhaust emissions caused by the burning of fuel are either fuel dependent (fuel type and quantity) or Euro class dependent. The latter reflect the emission regulations to which the vehicle complies. Regulated emissions are CO, NOx, particulate matter (PM) and total hydrocarbons (HC). Data from the Emissions Inventory Guidebook (EMEP/EEA, 2013) were used for specific exhaust emissions not covered by the HBEFA model.

Non-exhaust emissions are accounted for as weight dependent by-products and exist as seperate datasets.

For road infrastructure the expenditures and environmental interventions due to construction of roads have been allocated based on the gross tonne kilometer performance. Expenditures due to operation of the road infrastructure, as well as land use have been allocated based on the yearly vehicle kilometer performance. The same assumption on vehicle lifetime performance has been transferred from the ecoinvent v2 datasets of 540 000 km/vehicle. The production, maintenance and disposal of the vehicle are as reported in the ecoinvent (2007) report on transport services.

Main data sources:

De Ceuster, G., et al. (2009) TREMOVE: Final Report. Model code v2.7b, 2009. European Commission, Brussels.

Keller, M. et al. (2010) Handbook emission factors for road transport v3.1, HBEFA. INFRAS, Berne, CH.

Knörr, W. et al. (2011) Ecological Transport Information Tool for Worldwide Transports (EcoTransIT): Methodology and data update. Berlin, Hannover, Heidelberg, DE.

Ntziachristos, L., et al. (2013) EMEP/EEA air pollutant emissions inventory guidebook 2009: Exhaust emissions from road transport. European Environment Agency, Copenhagen, DK.

Spielmann, M., et al. (2007) Transport Services. ecoinvent report No. 14., Swiss Centre for Life Cycle Inventories, Dübendorf, CH.

## Included activities start
From combustion of fuel in the engine. The dataset takes as input the infrastructure of the lorry and road network, the materials and efforts needed for maintenance of these and the fuel consumed in the vehicle for the journey.

## Included activities end
The activity ends with the transport service of 1tkm and the emissions of exhaust and non-exhaust emissions into air, water and soil.

## Geography
The data for road infrastructure reflect Swiss conditions. Data for vehicle operation, manufacturing and maintenance represents generic European data. Data for the vehicle disposal reflect the Swiss situation. The environmental interventions due to vehicle transport are modelled by linking the environmental interventions due to vehicle operation with impacts due to vehicle manufacturing, vehicle maintenance, vehicle disposal, road construction, operation and maintenance of roads and road disposal. So-called demand factors are used to link the transport service components to the functional unit of one tonne kilometre [tkm] (Spielmann & Scholz 2005).
References:
Spielmann M. and Scholz R. W. (2005) Life Cycle Inventories for Transport Services - Background Data for Freight Transport. In: Int J LCA, 10(1), pp.

## Technology
Diesel and diesel engine. Lorry transport is further differentiated with respect to vehicle weight and emission technology standard (EURO-standard).

Technology classifications are based on those used widely within the works of the European Environment Agency, particularly in the Emissions Inventory Guidebook.

## Reference product
- transport, freight, lorry 16-32 metric ton, EURO5: 1 metric ton*km; CPC 6511: Road transport services of freight; By-product classification allocatable product
  production volume 5.13e10 metric ton*km; = 57000000000*0.9
    Value of tkm for RER in 2010 as provided in the Tremove model. Actual value provided: 5.6406E10 for an EU17 range of countries including Switzerland & Norway.
    It is estimated, that 10% of this transport is used for transport of goods in need of atmosphere control. And thus this porduction volume is included in those datasets.
  property price 0.02869 EUR2005
    Calculated based on inputs: The price of the product has been calculated as a sum of the values of the material and energy inputs for this product. This value is therefore a rough estimation. It may underestimate the real price since there are additional expenses when producing any product. These expences can include for example labour costs, treatment of waste materials and profit for the producer. Please consider carefully whether this level of data quality is acceptable for your application.

## By-products
- tyre wear emissions, lorry: 0.000219614 kg; = (8.055e-8*15786)/5.79; source Ntziachristos, L. 2013; CPC 39260: Used pneumatic tyres of rubber; By-product classification Waste; lognormal variance with pedigree 0.0015, pedigree (2,2,2,1,1)
  Road freight specific non-exhaust emissions.
  This dataset and the emission factors within it relate to 1kg of tyre wear. In order to use the treatment of non-exhaust emissions in a transport dataset the quantity of emissions per km must be calculated. Non-exhaust emissions are considered to be linearly scalable to gross vehicle weight (GVW). For tyre wear emissions from lorries the specific quantity is 8.055E-8 kg/kg GVW*km.
  The GVW of the 16-32t lorries using an average load factor is 15 786kg.
  The value calculated must then be devided by the average load to give the non-exhaust emissions per tkm.
  Uncertainty: NMVOC split: EMEP/EEA Emissions Inventory Guidebook 2009 - Exhaust emissions from road transport. Total NMVOC: HBEFA model v3.1. Data for Germany, without applying weighting
  production volume 1.12662e7 kg; = Ref('77354d28-64d5-4d22-9c1c-e99d8b76fdc8', 'ProductionVolume') * (Ref('f2a3b77d-c2e4-4d9f-a664-5d13a4f05e40') / Ref('77354d28-64d5-4d22-9c1c-e99d8b76fdc8'))
    Calculated from production volume of reference product using the relative outputs.
  property carbon content, fossil 0.675
    This amount equates to the amout for organic carbon reported in the Emissions Inventory Guidebook (Ntziachristos et al., 2013).
- road wear emissions, lorry: 1.9085e-5 kg; = (7.0e-9*15786)/5.79; source Ntziachristos, L. 2013; By-product classification Waste; CPC 53211: Highways (except elevated highways), streets and roads; lognormal variance with pedigree 0.0015, pedigree (2,2,2,1,1)
  Road freight specific non-exhaust emissions.
  This dataset and the emission factors within it relate to 1kg of tyre wear. In order to use the treatment of non-exhaust emissions in a transport dataset the quantity of emissions per km must be calculated. Non-exhaust emissions are considered to be linearly scalable to gross vehicle weight (GVW). For road wear emissions due to lorries the specific quantity is 7.0E-9 kg/kg GVW*km.
  The GVW of the 16-32t lorries using an average load factor is 15 786kg.
  The value calculated must then be devided by the average load to give the non-exhaust emissions per tkm.
  Uncertainty: NMVOC split: EMEP/EEA Emissions Inventory Guidebook 2009 - Exhaust emissions from road transport. Total NMVOC: HBEFA model v3.1. Data for Germany, without applying weighting
  production volume 979059 kg; = Ref('77354d28-64d5-4d22-9c1c-e99d8b76fdc8', 'ProductionVolume') * (Ref('9c411e55-23bc-4b90-b337-7c2c8bf4477e') / Ref('77354d28-64d5-4d22-9c1c-e99d8b76fdc8'))
    Calculated from production volume of reference product using the relative outputs.
  property carbon content, fossil 0.75
    The amount of carbon released due to road wear is not given in theEmissions Inventory Guidebook (Ntziachristos et al., 2013). For road wear there are no individual substances reported. Here we assume that 75% of the particle emissions are carbon, fossil in their nature due to the bitumen road surfacing.
- brake wear emissions, lorry: 2.21658e-5 kg; = (8.13e-9*15786)/5.79; source Ntziachristos, L. 2013; CPC 49129: Other parts and accessories n.e.c. of motor vehicles (including brakes, gear boxes, axles, road wheels, suspen[…]; By-product classification Waste; lognormal variance with pedigree 0.0015, pedigree (2,2,2,1,1)
  Road freight specific non-exhaust emissions.
  This dataset and the emission factors within it relate to 1kg of tyre wear. In order to use the treatment of non-exhaust emissions in a transport dataset the quantity of emissions per km must be calculated. Non-exhaust emissions are considered to be linearly scalable to gross vehicle weight (GVW). For brake wear emissions from lorries the specific quantity is 8.13E-9 kg/kg GVW*km.
  The GVW of the 16-32t lorries using an average load factor is 15 786kg.
  The value calculated must then be devided by the average load to give the non-exhaust emissions per tkm.
  Uncertainty: NMVOC split: EMEP/EEA Emissions Inventory Guidebook 2009 - Exhaust emissions from road transport. Total NMVOC: HBEFA model v3.1. Data for Germany, without applying weighting
  production volume 1.13711e6 kg; = Ref('77354d28-64d5-4d22-9c1c-e99d8b76fdc8', 'ProductionVolume') * (Ref('3a23ca73-18f7-4989-87d3-78f7aef07e4d') / Ref('77354d28-64d5-4d22-9c1c-e99d8b76fdc8'))
    Calculated from production volume of reference product using the relative outputs.
  property carbon content, fossil 0.149
    (same comment as for tyre wear emissions, lorry)

## Inputs from technosphere
- maintenance, lorry 16 metric ton: 3.2e-7 unit; source Spielmann M. 2007; lognormal variance with pedigree 0.302025, pedigree (3,1,1,2,1)
  EcoSpold01Location=CH
  Calculated value based on lifetime vkm (540 000 for all lorry sizes) and average load factors (see Activity Description).
  Uncertainty: own calculations
- road: 0.00105 m*year; source Spielmann M. 2007; lognormal variance with pedigree 0.302025, pedigree (3,1,1,2,1)
  EcoSpold01Location=CH
  Calculated value based demand factors and underlying assumptions for European road transport services. Values are based on total tkm of all road transport services (RER) and the relative shares of each specific form (i.e. 3.5-7.5t lorry). The value per tkm is then based on the net vehicle weight plus averge load factor (see Activity Description). Transport performance data is derived from TREMOVE (2009).
  Uncertainty: own calculations
- lorry, 16 metric ton: 3.2e-7 unit; source Spielmann M. 2007; lognormal variance with pedigree 0.302025, pedigree (3,1,1,2,1)
  Calculated value based on lifetime vkm (540 000 for all lorry sizes) and average load factors (see Activity Description).
  EcoSpold01Location=RER
  Uncertainty: own calculations
- diesel, low-sulfur: 0.0374688 kg; source Keller, M. 2010; lognormal variance with pedigree 0.0015, pedigree (2,2,2,1,1)
  Literature value. Derived from HBEFA database (Keller, 2010).
  Uncertainty: Fuel consumption from: HBEFA model v3.1. Data for Germany, without applying weighting
  properties: wet mass 1 kg, carbon content, fossil 0.865, dry mass 1 kg
  note on carbon content, fossil: C-content of diesel low-sulfur is 86.5% (ecoinvent v2.2 report 6_IV, Tab 3.14)

## Emissions to nature
- Styrene [air, unspecified]: 2.33664e-8 kg; source Ntziachristos, L. 2013; lognormal variance with pedigree 0.0015, pedigree (2,2,2,1,1)
  Literature value. The NMVOC split is provided by the EMEP/EEA (2013) guidebook. All elementary NMVOC exchanges available in the ecoinvent database and quantified in the EMEP/EEA guidebook are provided. Total NMVOC's derived from HBEFA database (Keller, 2010)..
  Uncertainty: NMVOC split: EMEP/EEA Emissions Inventory Guidebook 2009 - Exhaust emissions from road transport. Total NMVOC: HBEFA model v3.1. Data for Germany, without applying weighting
- Benzaldehyde [air, unspecified]: 5.71642e-8 kg; source Ntziachristos, L. 2013; lognormal variance with pedigree 0.0015, pedigree (2,2,2,1,1)
  (same comment as for Styrene)
- Arsenic [air, unspecified]: 3.74688e-12 kg; source Ntziachristos, L. 2013; lognormal variance with pedigree 0.0015, pedigree (2,2,2,1,1)
  Literature value. Fuel dependant emissions - heavy metal in fuel. Literature value. EMEP/EEA (2013) Tab. 3-100.
  Uncertainty: NMVOC split: EMEP/EEA Emissions Inventory Guidebook 2009 - Exhaust emissions from road transport. Total NMVOC: HBEFA model v3.1. Data for Germany, without applying weighting
- Sulfur dioxide [air, unspecified]: 5.76228e-7 kg; source Keller, M. 2010; lognormal variance with pedigree 0.0015, pedigree (2,2,2,1,1)
  Literature value. Derived from HBEFA database (Keller, 2010).
  Uncertainty: Emission factor from: HBEFA model v3.1. Data for Germany, without applying weighting
- Carbon monoxide, fossil [air, unspecified]: 0.000187275 kg; source Keller, M. 2010; lognormal variance with pedigree 0.0015, pedigree (2,2,2,1,1)
  (same comment as for Sulfur dioxide)
- Formaldehyde [air, unspecified]: 3.50496e-7 kg; source Ntziachristos, L. 2013; lognormal variance with pedigree 0.0015, pedigree (2,2,2,1,1)
  (same comment as for Styrene)
- Selenium [air, unspecified]: 3.74688e-12 kg; source Ntziachristos, L. 2013; lognormal variance with pedigree 0.7009, pedigree (2,2,2,1,1)
  Literature value. Fuel dependant emissions - heavy metal in fuel. Literature value. EMEP/EEA (2013) Tab. 3-100.
  Uncertainty: Trace elements in fuel. Data from EMEP/EEA (2009) Emissions Inventory Guidebook - Exhaust emissions form road transport
- Chromium VI [air, unspecified]: 2.24813e-12 kg; source Ntziachristos, L. 2013; lognormal variance with pedigree 0.7009, pedigree (2,2,2,1,1)
  Estimated value. Fuel dependant emissions - heavy metal in fuel. Estimated using the underlying assumption that 0.2% of the emitted Cr is emitted as Cr(IV). Fuel dependant emissions - heavy metal in fuel. Literature value for Cr. EMEP/EEA (2013) Tab. 3-100.
  Uncertainty: Trace elements in fuel. Data from EMEP/EEA (2009) Emissions Inventory Guidebook - Exhaust emissions form road transport
- Methane, fossil [air, unspecified]: 1.02604e-7 kg; source Keller, M. 2010; lognormal variance with pedigree 0.0015, pedigree (2,2,2,1,1)
  (same comment as for Sulfur dioxide)
- Dinitrogen monoxide [air, unspecified]: 6.76218e-6 kg; source Keller, M. 2010; lognormal variance with pedigree 0.0015, pedigree (2,2,2,1,1)
  (same comment as for Sulfur dioxide)
- Carbon dioxide, fossil [air, unspecified]: 0.117373 kg; source Keller, M. 2010; lognormal variance with pedigree 0.0015, pedigree (2,2,2,1,1)
  (same comment as for Sulfur dioxide)
- PAH, polycyclic aromatic hydrocarbons [air, unspecified]: 2.93006e-9 kg; source Ntziachristos, L. 2013; lognormal variance with pedigree 0.7009, pedigree (2,2,2,1,1)
  Literature value. PAH's per kg fuel use provided by the EMEP/EEA (2013) guidebook.
  Uncertainty: Data from EMEP/EEA (2009) Emissions Inventory Guidebook - Exhaust emissions form road transport
- Cadmium [air, unspecified]: 3.25978e-10 kg; source Ntziachristos, L. 2013; lognormal variance with pedigree 0.7009, pedigree (2,2,2,1,1)
  (same comment as for Selenium)
- Toluene [air, unspecified]: 4.17257e-10 kg; source Ntziachristos, L. 2013; lognormal variance with pedigree 0.0015, pedigree (2,2,2,1,1)
  (same comment as for Styrene)
- Copper [air, unspecified]: 7.94338e-10 kg; source Ntziachristos, L. 2013; lognormal variance with pedigree 0.7009, pedigree (2,2,2,1,1)
  (same comment as for Selenium)
- Particulates, < 2.5 um [air, unspecified]: 3.59508e-6 kg; source Keller, M. 2010; lognormal variance with pedigree 0.0015, pedigree (2,2,2,1,1)
  Literature value. Derived from HBEFA database (Keller, 2010).
  Uncertainty: Emission factor from: HBEFA model v3.1. Data for Germany, without applying weighting. All exhaust particulate emissions considered as less than 2.5 micrometers in diameter.
- Nitrogen oxides [air, unspecified]: 0.000331258 kg; source Keller, M. 2010; lognormal variance with pedigree 0.0015, pedigree (2,2,2,1,1)
  (same comment as for Sulfur dioxide)
- Zinc [air, unspecified]: 6.51207e-8 kg; source Ntziachristos, L. 2013; lognormal variance with pedigree 0.7009, pedigree (2,2,2,1,1)
  (same comment as for Selenium)
- NMVOC, non-methane volatile organic compounds, unspecified origin [air, unspecified]: 3.38938e-6 kg; source Keller, M. 2010; lognormal variance with pedigree 0.0015, pedigree (2,2,2,1,1)
  Literature value. Derived from HBEFA database (Keller, 2010) and emissions inventory guidebook (EMEP/EEA, 2013). Unspecified NMVOC's represent NMVOC's for which no elementary exchange exists in the ecoinvent database. Total NMVOC's are given by the HBEFA database with the split being provided by the EMEP/EEA (2013) guidebook.
  Uncertainty: NMVOC split: EMEP/EEA Emissions Inventory Guidebook 2009 - Exhaust emissions from road transport. Total NMVOC: HBEFA model v3.1. Data for Germany, without applying weighting
- Lead [air, unspecified]: 1.95212e-9 kg; source Ntziachristos, L. 2013; lognormal variance with pedigree 0.7009, pedigree (2,2,2,1,1)
  (same comment as for Selenium)
- Mercury [air, unspecified]: 1.98584e-10 kg; source Ntziachristos, L. 2013; lognormal variance with pedigree 0.7009, pedigree (2,2,2,1,1)
  (same comment as for Selenium)
- Ethane [air, unspecified]: 1.25177e-9 kg; source Ntziachristos, L. 2013; lognormal variance with pedigree 0.0015, pedigree (2,2,2,1,1)
  (same comment as for Styrene)
- Acrolein [air, unspecified]: 7.38545e-8 kg; source Ntziachristos, L. 2013; lognormal variance with pedigree 0.0015, pedigree (2,2,2,1,1)
  (same comment as for Styrene)
- Heptane [air, unspecified]: 1.25177e-8 kg; source Ntziachristos, L. 2013; lognormal variance with pedigree 0.0015, pedigree (2,2,2,1,1)
  (same comment as for Styrene)
- Chromium [air, unspecified]: 1.12406e-9 kg; source Ntziachristos, L. 2013; lognormal variance with pedigree 0.7009, pedigree (2,2,2,1,1)
  (same comment as for Selenium)
- Ammonia [air, unspecified]: 5.18457e-7 kg; source Keller, M. 2010; lognormal variance with pedigree 0.0015, pedigree (2,2,2,1,1)
  (same comment as for Sulfur dioxide)
- Nickel [air, unspecified]: 3.29725e-10 kg; source Ntziachristos, L. 2013; lognormal variance with pedigree 0.7009, pedigree (2,2,2,1,1)
  (same comment as for Selenium)
- Acetaldehyde [air, unspecified]: 1.90687e-7 kg; source Ntziachristos, L. 2013; lognormal variance with pedigree 0.0015, pedigree (2,2,2,1,1)
  (same comment as for Styrene)
- Propane [air, unspecified]: 4.17257e-9 kg; source Ntziachristos, L. 2013; lognormal variance with pedigree 0.0015, pedigree (2,2,2,1,1)
  (same comment as for Styrene)
- m-Xylene [air, unspecified]: 4.08912e-8 kg; source Ntziachristos, L. 2013; lognormal variance with pedigree 0.0015, pedigree (2,2,2,1,1)
  (same comment as for Styrene)
- o-Xylene [air, unspecified]: 1.66903e-8 kg; source Ntziachristos, L. 2013; lognormal variance with pedigree 0.0015, pedigree (2,2,2,1,1)
  (same comment as for Styrene)
- Benzene [air, unspecified]: 2.9208e-9 kg; source Ntziachristos, L. 2013; lognormal variance with pedigree 0.0015, pedigree (2,2,2,1,1)
  (same comment as for Styrene)
- Pentane [air, unspecified]: 2.50354e-9 kg; source Ntziachristos, L. 2013; lognormal variance with pedigree 0.0015, pedigree (2,2,2,1,1)
  (same comment as for Styrene)
- Butane [air, unspecified]: 6.25886e-9 kg; source Ntziachristos, L. 2013; lognormal variance with pedigree 0.0015, pedigree (2,2,2,1,1)
  (same comment as for Styrene)

## Sampling procedure
Literature data.
